# Функция активации Сигмоид (логистическая)
Sigma(x) := vectorize(1/(1 + e^(-x)))
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# Производная функции активации
# По известному значению выхода | По значению входа
dSigmaU(u) := vectorize(u*(1 - u))
dSigmaX(x) := vectorize(e^x/(1 + e^x)^2)
# Определение сети
# Первый слой
# Вход
# Матрица связей
Смещение
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In_0 := [0; 1]
W_0 := [1.0, 0.5; -1, 2.0]
Offset_0 := [1; 1]
# Возбуждение слоя | Выход слоя
U_0 := W_0*In_0 + Offset_0
U_0 = [1.5; 3]
Out_0 := Sigma(U_0)
In_1 := Out_0 = [0.817574; 0.952574]
W_1 := [1.5; -1]
Offset_1 := [1]
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U_1 := W_1*In_1 + Offset_1
U_1 = [1.27379]
Out_1 := Sigma(U_1)
Out_1 = [0.78139]
# Считаем что корректное значение на выходе сети должно быть = 1
ExpectedOut := [1]
Err2 := sum(vectorize((ExpectedOut - Out_1)^2))/2
Err2 = 0.0238951  # Ошибка по выходу сети (СКО)
# Ошибки на выходах слоёв
ErrorOut_1 := (ExpectedOut - Out_1)*dSigmaU(Out_1)  # на выходном слое ошибка рассчитывается по ожидаемому значению на выходе слоя
ErrorOut_1 = 0.0373428
ErrorOut_0 := vectorize(W_1*ErrorOut_1*dSigmaU(Out_0))  # на промежуточных слоях ошибка вычисляется по ошибке предыдущего слоя
ErrorOut_0 = [0.00835431; -0.00168702]
# Корректируем коэффициенты матриц слоёв на основе значений ошибок
